# mining copper ore

Dataset: EcoSpold 1, multi-output process
Functional unit: 1 kg
Category: metals / extraction
Geography: RAS
Time period: 1994 to 2003
Synonyms: Copper concentrate; Kupfererz konzentrat; Molybdenite; Molybdänit
Production volume: 9.5 million tonnes in Cu in 1994
Share of production covered: 84 %
Generated by: Mischa Classen
copyright: true
accessRestrictedTo: 0

## General comment
The multi-output-process "mining copper-ore" delivers the co-products "copper concentrate, at beneficiation" and "molybdenum, molybdenite concentrate, couple production Cu". The product "copper concentrate" is a intermediary process required in the following copper production (5.2.5 Winning of primary copper in ecoinvent). The module "molybdenite concentrate" is designed for the use in Ecoinvent as starting material for the manufacturing of molybdenum trioxide and ferromolybdenum, both materials which used in the manufacturing of high quality steels and alloys.

## Included processes
The module includes a mining and a beneficiation step with the mining infrastructure and disposal of overburden and tailings (see part II "Auxiliary Processes").

## Geography
This module is valid for the whole corresponding region. Some agents used like lime or sodium cyanide originate from data sets valid for Switzerland or Europe. Processes like blasting and transport originate from data sets valid for Switzerland or Europe.

## Technology
Mining is done 70% open pit and 30% underground, followed by joint beneficiation of copper and molybdenite trough flotation, where considerable amounts of agents are added. Overburden and tailings are disposed near the mining site.

## By-products
- copper, concentrate, at beneficiation [RAS]: 1 kg
- molybdenum, molybdenite concentrate, couple production Cu [RAS]: 0.00411 kg

## Inputs from technosphere
- chemicals inorganic, at plant [GLO]: 0.0483 kg; lognormal SD95 2
  reported values
- sodium cyanide, at plant [RER]: 0.0022 kg; lognormal SD95 2
  reported values
- chemicals organic, at plant [GLO]: 0.0142 kg; lognormal SD95 2
  reported values
- limestone, milled, packed, at plant [CH]: 0.0828 kg; lognormal SD95 1.04
  reported values
- blasting [RER]: 0.0628 kg; lognormal SD95 1.13
  (2,2,2,1,1,4,4)
- conveyor belt, at plant [RER]: 4.75e-6 m; lognormal SD95 3.36
  (5,5,1,1,3,5,9)
- diesel, burned in building machine [GLO]: 0.00344 MJ; lognormal SD95 1.13
  (2,2,2,1,1,4,4)
- electricity, medium voltage, production UCTE, at grid [UCTE]: 0.541 kWh; lognormal SD95 1.14
  (2,3,2,1,1,4,2)
- electricity, hydropower, at run-of-river power plant [RER]: 0.812 kWh; lognormal SD95 1.14
  (2,3,2,1,1,4,2)
- aluminium hydroxide, plant [RER]: 5.28e-10 unit; lognormal SD95 3.07
  (3,2,2,1,3,4,9)
- chromium steel 18/8, at plant [RER]: 0.0433 kg; lognormal SD95 1.2
  reported values
- non-ferrous metal, mine, surface [GLO]: 5.38e-10 unit; lognormal SD95 3.36
  (5,5,1,1,3,5,9)
- non-ferrous metal, mine, underground [GLO]: 2.35e-10 unit; lognormal SD95 3.36
  (5,5,1,1,3,5,9)
- disposal, sulfidic tailings, off-site [GLO]: 125 kg; lognormal SD95 1.13
  (2,2,2,1,1,4,6)

## Inputs from nature
- Occupation, mineral extraction site [resource, land]: 0.00328 m2a; lognormal SD95 1.51
  (2,2,2,1,1,2,7)
- Transformation, from unknown [resource, land]: 0.000109 m2; lognormal SD95 2.01
  (2,2,2,1,1,2,8)
- Transformation, to mineral extraction site [resource, land]: 0.000109 m2; lognormal SD95 2.01
  (2,2,2,1,1,2,8)
- Water, river [resource, in water]: 0.084 m3; lognormal SD95 1.13
  (2,2,1,1,1,4,12)
- Copper, 0.52% in sulfide, Cu 0.27% and Mo 8.2E-3% in crude ore, in ground [resource, in ground]: 0.327 kg; lognormal SD95 1.13
  (2,2,2,1,1,4,12)
- Molybdenum, 0.016% in sulfide, Mo 8.2E-3% and Cu 0.27% in crude ore, in ground [resource, in ground]: 0.00784 kg; lognormal SD95 1.13
  (2,2,2,1,1,4,12)

## Emissions to nature
- Antimony [air, low population density]: 5.78e-9 kg; lognormal SD95 1.59
  (3,2,1,1,3,4,31)
- Arsenic [air, low population density]: 4.33e-8 kg; lognormal SD95 1.59
  (3,2,1,1,3,4,31)
- Beryllium [air, low population density]: 7.51e-8 kg; lognormal SD95 1.59
  (3,2,1,1,3,4,31)
- Boron [air, low population density]: 2.89e-7 kg; lognormal SD95 1.59
  (3,2,1,1,3,4,31)
- Cadmium [air, low population density]: 3.18e-9 kg; lognormal SD95 1.59
  (3,2,1,1,3,4,31)
- Carbon dioxide, fossil [air, low population density]: 0.0364 kg; lognormal SD95 2.3
  (5,3,3,6,5,5,24)
- Carbon disulfide [air, low population density]: 0.00628 kg; lognormal SD95 2.31
  (4,2,2,5,4,4,23)
- Chromium [air, low population density]: 2.89e-6 kg; lognormal SD95 1.59
  (3,2,1,1,3,4,31)
- Cobalt [air, low population density]: 5.78e-7 kg; lognormal SD95 1.59
  (3,2,1,1,3,4,31)
- Copper [air, low population density]: 1.44e-6 kg; lognormal SD95 1.59
  (3,2,1,1,3,4,31)
- Fluorine [air, low population density]: 2.74e-5 kg; lognormal SD95 1.59
  (3,2,1,1,3,4,31)
- Heat, waste [air, low population density]: 4.87 MJ; lognormal SD95 1.14
  (2,3,2,1,1,4,13)
- Lead [air, low population density]: 4.04e-7 kg; lognormal SD95 1.59
  (3,2,1,1,3,4,31)
- Manganese [air, low population density]: 2.74e-5 kg; lognormal SD95 1.59
  (3,2,1,1,3,4,31)
- Mercury [air, low population density]: 1.44e-9 kg; lognormal SD95 1.59
  (3,2,1,1,3,4,31)
- Nickel [air, low population density]: 2.31e-6 kg; lognormal SD95 1.59
  (3,2,1,1,3,4,31)
- Particulates, < 2.5 um [air, low population density]: 0.0147 kg; lognormal SD95 2.69
  (3,2,1,1,5,4,23)
- Particulates, > 10 um [air, low population density]: 0.00142 kg; lognormal SD95 2.69
  (3,2,1,1,5,4,19)
- Particulates, > 2.5 um, and < 10um [air, low population density]: 0.0128 kg; lognormal SD95 3.69
  (3,2,1,1,5,4,20)
- Selenium [air, low population density]: 1.44e-9 kg; lognormal SD95 1.59
  (3,2,1,1,3,4,31)
- Zinc [air, low population density]: 5.49e-6 kg; lognormal SD95 1.59
  (3,2,1,1,3,4,31)
- Aluminum [water, river]: 7.25e-6 kg; lognormal SD95 10
  reported values
- Arsenic, ion [water, river]: 2.48e-7 kg; lognormal SD95 10
  reported values
- BOD5, Biological Oxygen Demand [water, river]: 0.000875 kg; lognormal SD95 10
  reported values
- Cadmium, ion [water, river]: 2.65e-8 kg; lognormal SD95 10
  reported values
- Calcium, ion [water, river]: 0.0576 kg; lognormal SD95 10
  reported values
- Chromium, ion [water, river]: 4.59e-8 kg; lognormal SD95 10
  reported values
- Cobalt [water, river]: 6.56e-8 kg; lognormal SD95 10
  reported values
- COD, Chemical Oxygen Demand [water, river]: 0.000875 kg; lognormal SD95 10
  reported values
- Copper, ion [water, river]: 6.65e-7 kg; lognormal SD95 10
  reported values
- Cyanide [water, river]: 0.000244 kg; lognormal SD95 1.84
  (4,2,2,3,4,4,33)
- DOC, Dissolved Organic Carbon [water, river]: 0.000342 kg; lognormal SD95 10
  reported values
- Iron, ion [water, river]: 2.44e-5 kg; lognormal SD95 10
  reported values
- Lead [water, river]: 2.35e-7 kg; lognormal SD95 10
  reported values
- Manganese [water, river]: 2.07e-6 kg; lognormal SD95 10
  reported values
- Mercury [water, river]: 3.16e-9 kg; lognormal SD95 10
  reported values
- Nickel, ion [water, river]: 2.04e-6 kg; lognormal SD95 10
  reported values
- Nitrogen, organic bound [water, river]: 0.00191 kg; lognormal SD95 10
  reported values
- Solved solids [water, river]: 0.000434 kg; lognormal SD95 10
  reported values
- Sulfate [water, river]: 0.198 kg; lognormal SD95 10
  reported values
- TOC, Total Organic Carbon [water, river]: 0.000342 kg; lognormal SD95 10
  reported values
- Zinc, ion [water, river]: 6.37e-6 kg; lognormal SD95 10
  reported values

## Allocation factors
- 97.6 % to copper, concentrate, at beneficiation: electricity, medium voltage, production UCTE, at grid; limestone, milled, packed, at plant; electricity, hydropower, at run-of-river power plant; blasting; diesel, burned in building machine; chromium steel 18/8, at plant; chemicals inorganic, at plant; sodium cyanide, at plant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
- 64 % to copper, concentrate, at beneficiation: Molybdenum, 0.016% in sulfide, Mo 8.2E-3% and Cu 0.27% in crude ore, in ground
- 100 % to copper, concentrate, at beneficiation: Copper, 0.52% in sulfide, Cu 0.27% and Mo 8.2E-3% in crude ore, in ground; copper, concentrate, at beneficiation
- 2.4 % to molybdenum, molybdenite concentrate, couple production Cu: electricity, medium voltage, production UCTE, at grid; limestone, milled, packed, at plant; electricity, hydropower, at run-of-river power plant; blasting; diesel, burned in building machine; chromium steel 18/8, at plant; chemicals inorganic, at plant; sodium cyanide, at plant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
- 36 % to molybdenum, molybdenite concentrate, couple production Cu: Molybdenum, 0.016% in sulfide, Mo 8.2E-3% and Cu 0.27% in crude ore, in ground
- 0 % to molybdenum, molybdenite concentrate, couple production Cu: Copper, 0.52% in sulfide, Cu 0.27% and Mo 8.2E-3% in crude ore, in ground
- 100 % to molybdenum, molybdenite concentrate, couple production Cu: molybdenum, molybdenite concentrate, couple production Cu

## Sampling procedure
literature

## Extrapolations
see Geography and Technology

## Sources
- Althaus H.-J., Blaser S., Classen M., Jungbluth N., 2004, Life Cycle Inventories of Metals, Final report ecoinvent 2000, 10, Swiss Centre for LCI, EMPA-DU, Dübendorf, CH

## Validation
passed
