# natural gas, burned in cogen 160kWe Jakobsberg, allocation energy

Dataset: EcoSpold 1, multi-output process
Functional unit: 1 MJ
Category: natural gas / cogeneration
Geography: CH
Time period: 2000 to 2000
Generated by: Thomas Heck
copyright: true
accessRestrictedTo: 0

## General comment
The multioutput-process 'natural gas, burned in cogen 160kWe Jakobsberg, allocation energy' delivers the coproducts 'electricity, at cogen 160kWe Jakobsberg, allocation energy' and 'heat, at cogen 160kWe Jakobsberg, allocation energy'.

## Included processes
The module includes fuel input, infrastructure, emissions to air, and substances needed for operation.

## Geography
Efficiencies refer to a specific plant in Switzerland.

## Technology
Specific cogeneration unit installed in Switzerland.

## By-products
- electricity, at cogen 160kWe Jakobsberg, allocation energy [CH]: 0.075 kWh
- heat, at cogen 160kWe Jakobsberg, allocation energy [CH]: 0.49 MJ

## Inputs from technosphere
- lubricating oil, at plant [RER]: 3e-5 kg; lognormal SD95 1.2
  vender information
- cogen unit 160kWe, common components for heat+electricity [RER]: 5e-9 unit; lognormal SD95 1
- cogen unit 160kWe, components for electricity only [RER]: 5e-9 unit; lognormal SD95 1
- cogen unit 160kWe, components for heat only [RER]: 5e-9 unit; lognormal SD95 1
- natural gas, low pressure, at consumer [CH]: 1 MJ; lognormal SD95 1
- disposal, used mineral oil, 10% water, to hazardous waste incineration [CH]: 3e-5 kg; lognormal SD95 2
  rough estimate

## Emissions to nature
- Carbon dioxide, fossil [air, high population density]: 0.056 kg; lognormal SD95 1.1
  composition of natural gas
- Carbon monoxide, fossil [air, high population density]: 4.8e-5 kg; lognormal SD95 2
  estimate based on different references
- Dinitrogen monoxide [air, high population density]: 2.5e-6 kg; lognormal SD95 3
  rough estimate
- Heat, waste [air, high population density]: 0.83 MJ; lognormal SD95 1.1
  uncertainty of heating value and electric efficiency
- Methane, fossil [air, high population density]: 2.3e-5 kg; lognormal SD95 3
  estimate based on different references
- Nitrogen oxides [air, high population density]: 1.5e-5 kg; lognormal SD95 2
  estimate based on different references
- NMVOC, non-methane volatile organic compounds, unspecified origin [air, high population density]: 2e-6 kg; lognormal SD95 3
  estimate based on different references
- Particulates, < 2.5 um [air, high population density]: 1.5e-7 kg; lognormal SD95 2
  estimate based on different references
- Platinum [air, high population density]: 7e-12 kg; lognormal SD95 10
  (Artelt et al. 2000)
- Sulfur dioxide [air, high population density]: 5.5e-7 kg; lognormal SD95 1.1
  composition of natural gas

## Allocation factors
- 36 % to electricity, at cogen 160kWe Jakobsberg, allocation energy: natural gas, low pressure, at consumer; cogen unit 160kWe, common components for heat+electricity; lubricating oil, at plant; disposal, used mineral oil, 10% water, to hazardous waste incineration; Nitrogen oxides; Carbon monoxide, fossil; Carbon dioxide, fossil; Methane, fossil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
- 100 % to electricity, at cogen 160kWe Jakobsberg, allocation energy: cogen unit 160kWe, components for electricity only; electricity, at cogen 160kWe Jakobsberg, allocation energy
- 0 % to electricity, at cogen 160kWe Jakobsberg, allocation energy: cogen unit 160kWe, components for heat only
- 64 % to heat, at cogen 160kWe Jakobsberg, allocation energy: natural gas, low pressure, at consumer; cogen unit 160kWe, common components for heat+electricity; lubricating oil, at plant; disposal, used mineral oil, 10% water, to hazardous waste incineration; Nitrogen oxides; Carbon monoxide, fossil; Carbon dioxide, fossil; Methane, fossil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
- 0 % to heat, at cogen 160kWe Jakobsberg, allocation energy: cogen unit 160kWe, components for electricity only
- 100 % to heat, at cogen 160kWe Jakobsberg, allocation energy: cogen unit 160kWe, components for heat only; heat, at cogen 160kWe Jakobsberg, allocation energy

## Sampling procedure
Emission measurements of operator, literature. Efficiencies from operator data.

## Sources
- Heck, T., 2003, Wärme-Kraft-Kopplung, Sachbilanzen von Energiesystemen. Final report No. 6 ecoinvent 2000, 6, Swiss Centre for LCI, PSI, Dübendorf and Villigen, CH

## Validation
passed
